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/BATCH
/COM,ANSYS RELEASE Release 19.0      BUILD 19.0      UP20171214       13:21:20
/input,menust,tmp,''
/GST,ON
/PLO,INFO,3
/GRO,CURL,ON
/CPLANE,1
WPSTYLE,,,,,,,,0
/SOLU
FINISH
/PREP7
FINISH
! /EXIT,ALL
/BATCH
/COM,ANSYS RELEASE Release 19.0      BUILD 19.0      UP20171214       18:27:25
/input,menust,tmp,''
/GST,ON
/PLO,INFO,3
/GRO,CURL,ON
/CPLANE,1
WPSTYLE,,,,,,,,0
FINISH
! /EXIT,NOSAV
/BATCH
/COM,ANSYS RELEASE Release 19.0      BUILD 19.0      UP20171214       09:53:49
/input,menust,tmp,''
/GST,ON
/PLO,INFO,3
/GRO,CURL,ON
/CPLANE,1
WPSTYLE,,,,,,,,0
/NOPR
KEYW,PR_SET,1
KEYW,PR_STRUC,1
KEYW,PR_THERM,0
KEYW,PR_FLUID,0
KEYW,PR_ELMAG,0
KEYW,MAGNOD,0
KEYW,MAGEDG,0
KEYW,MAGHFE,0
KEYW,MAGELC,0
KEYW,PR_MULTI,0
/GO
/COM,
/COM,Preferences for GUI filtering have been set to display:
/COM,  Structural
/PREP7
ET,1,MASS21
/BATCH
/COM,ANSYS RELEASE Release 19.0      BUILD 19.0      UP20171214       10:16:13
/input,menust,tmp,''
/GST,ON
/PLO,INFO,3
/GRO,CURL,ON
/CPLANE,1
WPSTYLE,,,,,,,,0
/PREP7
ET,1,PLANE182
KEYOPT,1,1,0
KEYOPT,1,3,0
KEYOPT,1,6,0
/NOPR
KEYW,PR_SET,1
KEYW,PR_STRUC,1
KEYW,PR_THERM,0
KEYW,PR_FLUID,0
KEYW,PR_ELMAG,0
KEYW,MAGNOD,0
KEYW,MAGEDG,0
KEYW,MAGHFE,0
KEYW,MAGELC,0
KEYW,PR_MULTI,0
/GO
/COM,
/COM,Preferences for GUI filtering have been set to display:
/COM,  Structural
MPTEMP,,,,,,,,
MPTEMP,1,0
MPDATA,EX,1,,2.1e5
MPDATA,PRXY,1,,0
BLC4,-20,-20,40,40
CYL4, , ,4
ASBA,       2,       2
FLST,2,2,5,ORDE,2
FITEM,2,1
FITEM,2,-2
FLST,3,2,5,ORDE,2
FITEM,3,1
FITEM,3,-2
ASBA,P51X,P51X
FLST,2,2,5,ORDE,2
FITEM,2,1
FITEM,2,-2
ASBA,P51X,       1
FLST,3,2,5,ORDE,2
FITEM,3,1
FITEM,3,-2
ASBA,       2,P51X
FLST,2,2,5,ORDE,2
FITEM,2,1
FITEM,2,-2
FLST,2,2,5,ORDE,2
FITEM,2,1
FITEM,2,-2
FLST,3,2,5,ORDE,2
FITEM,3,1
FITEM,3,-2
ASBA,P51X,P51X
FLST,3,2,5,ORDE,2
FITEM,3,1
FITEM,3,-2
ASBA,       1,P51X
WPSTYLE,,,,,,,,1
WPSTYL, STAT
wpro,,90.000000,
wpro,,90.000000,
ASBW,       3
ASBW,       3
ASBW,       3
ASBW,       3
wpro,,-90.000000,
wpro,,,90.000000
wpro,,,90.000000
wpro,,,90.000000
wpro,,,90.000000
ASBW,       3
wpro,,90.000000,
wpro,,90.000000,
wpro,,,90.000000
wpro,90.000000,,
FLST,2,2,5,ORDE,2
FITEM,2,1
FITEM,2,-2
ASBW,P51X
APLOT
NPLOT
NPLOT
RESUME
/COM,ANSYS RELEASE Release 19.0      BUILD 19.0      UP20171214       10:39:23
RESUME
/COM,ANSYS RELEASE Release 19.0      BUILD 19.0      UP20171214       10:39:26
RESUME
/COM,ANSYS RELEASE Release 19.0      BUILD 19.0      UP20171214       10:39:27
RESUME
/COM,ANSYS RELEASE Release 19.0      BUILD 19.0      UP20171214       10:39:28
FINISH
! /EXIT,NOSAV
/BATCH
/COM,ANSYS RELEASE Release 19.0      BUILD 19.0      UP20171214       10:39:43
/input,menust,tmp,''
/GST,ON
/PLO,INFO,3
/GRO,CURL,ON
/CPLANE,1
WPSTYLE,,,,,,,,0
/NOPR
KEYW,PR_SET,1
KEYW,PR_STRUC,1
KEYW,PR_THERM,0
KEYW,PR_FLUID,0
KEYW,PR_ELMAG,0
KEYW,MAGNOD,0
KEYW,MAGEDG,0
KEYW,MAGHFE,0
KEYW,MAGELC,0
KEYW,PR_MULTI,0
/GO
/COM,
/COM,Preferences for GUI filtering have been set to display:
/COM,  Structural
/PREP7
ET,1,PLANE182
KEYOPT,1,1,0
KEYOPT,1,3,0
KEYOPT,1,6,0
BLC5,0,0,40,40
CYL4, , ,4
FLST,2,2,5,ORDE,2
FITEM,2,1
FITEM,2,-2
FLST,3,2,5,ORDE,2
FITEM,3,1
FITEM,3,-2
ASBA,P51X,P51X
FLST,2,2,5,ORDE,2
FITEM,2,1
FITEM,2,-2
FLST,3,2,5,ORDE,2
FITEM,3,1
FITEM,3,-2
ASBA,P51X,P51X
FLST,2,2,5,ORDE,2
FITEM,2,1
FITEM,2,-2
FLST,3,2,5,ORDE,2
FITEM,3,1
FITEM,3,-2
ASBA,P51X,P51X
FLST,2,2,5,ORDE,2
FITEM,2,1
FITEM,2,-2
FLST,3,2,5,ORDE,2
FITEM,3,1
FITEM,3,-2
ASBA,P51X,P51X
FLST,2,2,5,ORDE,2
FITEM,2,1
FITEM,2,-2
FLST,3,2,5,ORDE,2
FITEM,3,1
FITEM,3,-2
ASBA,P51X,P51X
FLST,2,2,5,ORDE,2
FITEM,2,1
FITEM,2,-2
FLST,2,2,5,ORDE,2
FITEM,2,1
FITEM,2,-2
FLST,3,2,5,ORDE,2
FITEM,3,1
FITEM,3,-2
ASBA,P51X,P51X
FLST,3,2,5,ORDE,2
FITEM,3,1
FITEM,3,-2
ASBA,       2,P51X
FLST,3,2,5,ORDE,2
FITEM,3,1
FITEM,3,-2
ASBA,       2,P51X
FLST,2,2,5,ORDE,2
FITEM,2,1
FITEM,2,-2
FLST,3,2,5,ORDE,2
FITEM,3,1
FITEM,3,-2
ASBA,P51X,P51X
FLST,2,2,5,ORDE,2
FITEM,2,1
FITEM,2,-2
FLST,3,2,5,ORDE,2
FITEM,3,1
FITEM,3,-2
ASBA,P51X,P51X
ASBA,       1,       2
ASBA,       3,       3
wpro,,90.000000,
ASBW,       3
wpro,90.000000,,
wpro,90.000000,,
wpro,90.000000,,
wpro,90.000000,,
FLST,2,2,5,ORDE,2
FITEM,2,1
FITEM,2,-2
ASBW,P51X
FLST,2,2,5,ORDE,2
FITEM,2,1
FITEM,2,-2
ASBW,P51X
FLST,2,2,5,ORDE,2
FITEM,2,1
FITEM,2,-2
ASBW,P51X
wpro,,,90.000000
FLST,2,2,5,ORDE,2
FITEM,2,1
FITEM,2,-2
ASBW,P51X
alist, all
WPSTYL, STAT
! /CMAP,' ',' ',' ',CREATE,  0
! /CMAP,' ',' ',' ',CREATE,  0
/NUMBER,0
/NUMBER,0
/NUMBER,0
FINISH
/POST1
FINISH
/POST26
FINISH
/POST1
FINISH
/SOL
/NOPR
KEYW,PR_SET,1
KEYW,PR_STRUC,1
KEYW,PR_THERM,0
KEYW,PR_FLUID,0
KEYW,PR_ELMAG,0
KEYW,MAGNOD,0
KEYW,MAGEDG,0
KEYW,MAGHFE,0
KEYW,MAGELC,0
KEYW,PR_MULTI,0
/GO
/COM,
/COM,Preferences for GUI filtering have been set to display:
/COM,  Structural
FINISH
/PREP7
SMRT,6
FINISH
/POST1
FINISH
/AUX12
FINISH
/POST1
FINISH
/SOL
FINISH
/POST1
SET,LIST
RSYS,0
AVPRIN,0
AVRES,2,
/EFACET,1
LAYER,0
FORCE,TOTAL
FINISH
/PREP7
CM,_Y,AREA
ASEL, , , ,       4
CM,_Y1,AREA
CMSEL,S,_Y
CMSEL,S,_Y1
AATT, , ,   1,       0,
CMSEL,S,_Y
CMDELE,_Y
CMDELE,_Y1
FINISH
! /EXIT,ALL
/BATCH
/COM,ANSYS RELEASE Release 19.0      BUILD 19.0      UP20171214       14:54:16
/input,menust,tmp,''
/GST,ON
/PLO,INFO,3
/GRO,CURL,ON
/CPLANE,1
WPSTYLE,,,,,,,,0
/NOPR
KEYW,PR_SET,1
KEYW,PR_STRUC,1
KEYW,PR_THERM,0
KEYW,PR_FLUID,0
KEYW,PR_ELMAG,0
KEYW,MAGNOD,0
KEYW,MAGEDG,0
KEYW,MAGHFE,0
KEYW,MAGELC,0
KEYW,PR_MULTI,0
/GO
/COM,
/COM,Preferences for GUI filtering have been set to display:
/COM,  Structural
/PREP7
ET,1,PLANE182
KEYOPT,1,1,0
KEYOPT,1,3,0
KEYOPT,1,6,0
MPTEMP,,,,,,,,
MPTEMP,1,0
MPDATA,EX,1,,2.1e5
MPDATA,PRXY,1,,0.3
MPTEMP,,,,,,,,
MPTEMP,1,0
MPDE,EX,1
MPDE,PRXY,1
MPDATA,EX,1,,2.1e5
MPDATA,PRXY,1,,0.3
MPTEMP,,,,,,,,
MPTEMP,1,0
MPDE,EX,1
MPDE,PRXY,1
MPDATA,EX,1,,2.1e5
MPDATA,PRXY,1,,0.3
MPTEMP,,,,,,,,
MPTEMP,1,0
MPDE,EX,1
MPDE,PRXY,1
MPDATA,EX,1,,2.1E+005
MPDATA,PRXY,1,,0.3
BLC5, , ,40,40
CYL4, , ,4
ASBA,       1,       2
ESIZE,0.2,0,
MSHKEY,0
CM,_Y,AREA
ASEL, , , ,       3
CM,_Y1,AREA
CHKMSH,'AREA'
CMSEL,S,_Y
AMESH,_Y1
CMDELE,_Y
CMDELE,_Y1
CMDELE,_Y2
ESIZE,1,0,
MSHKEY,0
CM,_Y,AREA
ASEL, , , ,       3
CM,_Y1,AREA
CHKMSH,'AREA'
CMSEL,S,_Y
ACLEAR,_Y1
AMESH,_Y1
CMDELE,_Y
CMDELE,_Y1
CMDELE,_Y2
SAVE,'mesh_flat','db','E:\GitHub\-\FiniteElementMethod\Demo\'
/CMAP,,,,
RESUME
/COM,ANSYS RELEASE Release 19.0      BUILD 19.0      UP20171214       15:44:40
RESUME
/COM,ANSYS RELEASE Release 19.0      BUILD 19.0      UP20171214       15:45:15
RESUME
/COM,ANSYS RELEASE Release 19.0      BUILD 19.0      UP20171214       15:45:16
RESUME
/COM,ANSYS RELEASE Release 19.0      BUILD 19.0      UP20171214       15:45:16
FINISH
! /EXIT,NOSAV
/BATCH
/COM,ANSYS RELEASE Release 19.0      BUILD 19.0      UP20171214       15:45:33
/input,menust,tmp,''
/GST,ON
/PLO,INFO,3
/GRO,CURL,ON
/CPLANE,1
WPSTYLE,,,,,,,,0
/NOPR
KEYW,PR_SET,1
KEYW,PR_STRUC,1
KEYW,PR_THERM,0
KEYW,PR_FLUID,0
KEYW,PR_ELMAG,0
KEYW,MAGNOD,0
KEYW,MAGEDG,0
KEYW,MAGHFE,0
KEYW,MAGELC,0
KEYW,PR_MULTI,0
/GO
/COM,
/COM,Preferences for GUI filtering have been set to display:
/COM,  Structural
/PREP7
ET,1,PLANE182
KEYOPT,1,1,0
KEYOPT,1,3,0
KEYOPT,1,6,0
MPTEMP,,,,,,,,
MPTEMP,1,0
MPDATA,EX,1,,2.1e11
MPDATA,PRXY,1,,0.3
BLC5, , ,0.040,0.040
CYL4, , ,0.004
KEYOPT,1,1,0
KEYOPT,1,3,0
KEYOPT,1,6,0
ETCHG,ETI
FINISH
! /EXIT,NOSAV
/BATCH
/COM,ANSYS RELEASE Release 19.0      BUILD 19.0      UP20171214       15:50:20
/input,menust,tmp,''
/GST,ON
/PLO,INFO,3
/GRO,CURL,ON
/CPLANE,1
WPSTYLE,,,,,,,,0
/NOPR
KEYW,PR_SET,1
KEYW,PR_STRUC,1
KEYW,PR_THERM,0
KEYW,PR_FLUID,0
KEYW,PR_ELMAG,0
KEYW,MAGNOD,0
KEYW,MAGEDG,0
KEYW,MAGHFE,0
KEYW,MAGELC,0
KEYW,PR_MULTI,0
/GO
/COM,
/COM,Preferences for GUI filtering have been set to display:
/COM,  Structural
/PREP7
ET,1,PLANE182
KEYOPT,1,1,0
KEYOPT,1,3,0
KEYOPT,1,6,0
MPTEMP,,,,,,,,
MPTEMP,1,0
MPDATA,EX,1,,2.1e5
MPDATA,PRXY,1,,0.3
BLC5, , ,40,40
CYL4, , ,4
ASBA,       1,       2
WPSTYLE,,,,,,,,1
WPSTYL, STAT
wpstyle,0.05,0.1,-1,1,0.003,0,2,,5
wpro,,,90.000000
wpro,,,90.000000
wpro,,90.000000,
wpro,,90.000000,
wpro,,90.000000,
wpro,-90.000000,,
wpro,-90.000000,,
wpro,,-90.000000,
wpro,,90.000000,
wpro,90.000000,,
wpro,90.000000,,
wpro,,,-90.000000
wpro,,,-90.000000
wpro,,,-90.000000
wpro,,,-90.000000
ASBW,       3
wpro,,,-90.000000
FLST,2,2,5,ORDE,2
FITEM,2,1
FITEM,2,-2
ASBW,P51X
/CMAP,,,,
/CMAP,,,,
RESUME
/COM,ANSYS RELEASE Release 19.0      BUILD 19.0      UP20171214       15:56:59
ESIZE,1,0,
MSHKEY,0
FLST,5,4,5,ORDE,2
FITEM,5,3
FITEM,5,-6
CM,_Y,AREA
ASEL, , , ,P51X
CM,_Y1,AREA
CHKMSH,'AREA'
CMSEL,S,_Y
AMESH,_Y1
CMDELE,_Y
CMDELE,_Y1
CMDELE,_Y2
ESIZE,2,0,
MSHKEY,0
FLST,5,4,5,ORDE,2
FITEM,5,3
FITEM,5,-6
CM,_Y,AREA
ASEL, , , ,P51X
CM,_Y1,AREA
CHKMSH,'AREA'
CMSEL,S,_Y
ACLEAR,_Y1
AMESH,_Y1
CMDELE,_Y
CMDELE,_Y1
CMDELE,_Y2
RESUME
/COM,ANSYS RELEASE Release 19.0      BUILD 19.0      UP20171214       16:02:50
MSHKEY,0
FLST,5,4,5,ORDE,2
FITEM,5,3
FITEM,5,-6
CM,_Y,AREA
ASEL, , , ,P51X
CM,_Y1,AREA
CHKMSH,'AREA'
CMSEL,S,_Y
AMESH,_Y1
CMDELE,_Y
CMDELE,_Y1
CMDELE,_Y2
RESUME
/COM,ANSYS RELEASE Release 19.0      BUILD 19.0      UP20171214       16:03:05
ESIZE,1.5,0,
MSHKEY,0
FLST,5,4,5,ORDE,2
FITEM,5,3
FITEM,5,-6
CM,_Y,AREA
ASEL, , , ,P51X
CM,_Y1,AREA
CHKMSH,'AREA'
CMSEL,S,_Y
AMESH,_Y1
CMDELE,_Y
CMDELE,_Y1
CMDELE,_Y2
/CMAP,,,,
/COLOR,GRBAK,BLAC
/COLOR,GRID,DGRA
/COLOR,AXLAB,WHIT
/COLOR,AXES,WHIT
/COLOR,AXNU,WHIT
/COLOR,CURVE,CYAN,1
/COLOR,CURVE,BMAG,2
/COLOR,CURVE,RED,3
/COLOR,CURVE,CBLU,4
/COLOR,CURVE,MRED,5
/COLOR,CURVE,GREE,6
/COLOR,CURVE,ORAN,7
/COLOR,CURVE,MAGE,8
/COLOR,CURVE,YGRE,9
/COLOR,CURVE,BLUE,10
/COLOR,GRBAK,BLAC
/COLOR,GRID,DGRA
/COLOR,AXLAB,WHIT
/COLOR,AXES,WHIT
/COLOR,AXNU,WHIT
/COLOR,CURVE,CYAN,1
/COLOR,CURVE,BMAG,2
/COLOR,CURVE,RED,3
/COLOR,CURVE,CBLU,4
/COLOR,CURVE,MRED,5
/COLOR,CURVE,GREE,6
/COLOR,CURVE,ORAN,7
/COLOR,CURVE,MAGE,8
/COLOR,CURVE,YGRE,9
/COLOR,CURVE,BLUE,10
! /CMAP,' ',' ',' ',CREATE,  0
! /CMAP,' ',' ',' ',CREATE,  0
/CMAP,,,,
/COLOR,U,CYAN
/COLOR,ROT,ORAN
/COLOR,TEMP,ORAN
/COLOR,VOLT,YGRE
/COLOR,MAG,YGRE
/COLOR,A,BMAG
/COLOR,F,RED
/COLOR,M,CBLU
/COLOR,HEAT,GCYA
/COLOR,AMPS,GCYA
/COLOR,FLUX,GCYA
/COLOR,CSG,YGRE
/COLOR,MAST,BMAG
/COLOR,CP,GREE
/COLOR,CE,MRED
/COLOR,NFOR,MRED
/COLOR,NMOM,GREE
/COLOR,RFOR,MAGE
/COLOR,RMOM,BMAG
/COLOR,PATH,WHIT
RESUME
/COM,ANSYS RELEASE Release 19.0      BUILD 19.0      UP20171214       16:07:34
RESUME
/COM,ANSYS RELEASE Release 19.0      BUILD 19.0      UP20171214       16:07:35
RESUME
/COM,ANSYS RELEASE Release 19.0      BUILD 19.0      UP20171214       16:07:36
RESUME
/COM,ANSYS RELEASE Release 19.0      BUILD 19.0      UP20171214       16:07:37
RESUME
/COM,ANSYS RELEASE Release 19.0      BUILD 19.0      UP20171214       16:07:37
RESUME
/COM,ANSYS RELEASE Release 19.0      BUILD 19.0      UP20171214       16:07:38
ESIZE,1.5,0,
MSHKEY,0
FLST,5,4,5,ORDE,2
FITEM,5,3
FITEM,5,-6
CM,_Y,AREA
ASEL, , , ,P51X
CM,_Y1,AREA
CHKMSH,'AREA'
CMSEL,S,_Y
AMESH,_Y1
CMDELE,_Y
CMDELE,_Y1
CMDELE,_Y2
MSHKEY,0
! /CMAP,' ',' ',' ',CREATE,  0
! /CMAP,' ',' ',' ',CREATE,  0
/CMAP,,,,
/CMAP,,,,
/COLOR,NUM,CYAN,1
/COLOR,NUM,BMAG,2
/COLOR,NUM,RED,3
/COLOR,NUM,CBLU,4
/COLOR,NUM,MRED,5
/COLOR,NUM,GREE,6
/COLOR,NUM,ORAN,7
/COLOR,NUM,MAGE,8
/COLOR,NUM,YGRE,9
/COLOR,NUM,BLUE,10
/COLOR,NUM,GCYA,11
MSHKEY,0
FINISH
/SOL
FLST,2,2,4,ORDE,2
FITEM,2,4
FITEM,2,17
DL,P51X, ,SYMM
FLST,2,2,4,ORDE,2
FITEM,2,11
FITEM,2,-12
DL,P51X, ,SYMM
FLST,2,4,4,ORDE,4
FITEM,2,4
FITEM,2,11
FITEM,2,-12
FITEM,2,17
FLST,2,2,4,ORDE,2
FITEM,2,4
FITEM,2,17
/GO
DL,P51X, ,UX,
FLST,2,2,4,ORDE,2
FITEM,2,11
FITEM,2,-12
/GO
DL,P51X, ,UY,
FLST,2,2,4,ORDE,2
FITEM,2,9
FITEM,2,14
/GO
SFL,P51X,PRES,1,
RESUME
/COM,ANSYS RELEASE Release 19.0      BUILD 19.0      UP20171214       16:14:42
FINISH
/PREP7
ESIZE,1.50,0,
MSHKEY,0
FLST,5,4,5,ORDE,2
FITEM,5,3
FITEM,5,-6
CM,_Y,AREA
ASEL, , , ,P51X
CM,_Y1,AREA
CHKMSH,'AREA'
CMSEL,S,_Y
AMESH,_Y1
CMDELE,_Y
CMDELE,_Y1
CMDELE,_Y2
MSHKEY,0
SAVE
RESUME
/COM,ANSYS RELEASE Release 19.0      BUILD 19.0      UP20171214       16:15:30
FINISH
/SOL
FLST,2,2,4,ORDE,2
FITEM,2,11
FITEM,2,-12
/GO
DL,P51X, ,UY,
FLST,2,2,4,ORDE,2
FITEM,2,4
FITEM,2,17
/GO
DL,P51X, ,UX,
FLST,2,2,4,ORDE,2
FITEM,2,9
FITEM,2,14
/GO
SFL,P51X,PRES,1,1
RESUME
/COM,ANSYS RELEASE Release 19.0      BUILD 19.0      UP20171214       16:16:57
FLST,2,2,4,ORDE,2
FITEM,2,11
FITEM,2,-12
/GO
DL,P51X, ,UY,
FLST,2,2,4,ORDE,2
FITEM,2,4
FITEM,2,17
/GO
DL,P51X, ,UX,
SAVE
FLST,2,2,4,ORDE,2
FITEM,2,9
FITEM,2,14
/GO
SFL,P51X,PRES,1,1
RESUME
/COM,ANSYS RELEASE Release 19.0      BUILD 19.0      UP20171214       16:17:59
FLST,2,2,4,ORDE,2
FITEM,2,9
FITEM,2,14
/GO
SFL,P51X,PRES,1,1
FLST,2,2,4,ORDE,2
FITEM,2,10
FITEM,2,13
/GO
SFL,P51X,PRES,-1,-1
/STATUS,SOLU
SOLVE
/STATUS,SOLU
RESUME
/COM,ANSYS RELEASE Release 19.0      BUILD 19.0      UP20171214       16:20:12
FLST,2,2,4,ORDE,2
FITEM,2,9
FITEM,2,14
/GO
SFL,P51X,PRES,-1,-1
FLST,2,2,4,ORDE,2
FITEM,2,10
FITEM,2,13
/GO
SFL,P51X,PRES,1,1
FLST,2,2,4,ORDE,2
FITEM,2,10
FITEM,2,13
/GO
SFL,P51X,PRES,-2,-2
RESUME
/COM,ANSYS RELEASE Release 19.0      BUILD 19.0      UP20171214       16:22:13
FLST,2,2,4,ORDE,2
FITEM,2,9
FITEM,2,14
/GO
SFL,P51X,PRES,-1,-1
FLST,2,2,4,ORDE,2
FITEM,2,10
FITEM,2,13
/GO
SFL,P51X,PRES,-1,-1
/STATUS,SOLU
SOLVE
/STATUS,SOLU
SOLVE
FINISH
/PREP7
MPTEMP,,,,,,,,
MPTEMP,1,0
MPDATA,EX,1,,2.1e5
MPDATA,PRXY,1,,0.3
FINISH
/SOL
/STATUS,SOLU
SOLVE
FINISH
/POST1
SAVE
/EFACET,1
PLNSOL, S,X, 0,1.0
/EFACET,1
PLNSOL, S,X, 0,0.5
/BATCH
/COM,ANSYS RELEASE Release 19.0      BUILD 19.0      UP20171214       16:45:20
/input,menust,tmp,''
/GST,ON
/PLO,INFO,3
/GRO,CURL,ON
/CPLANE,1
WPSTYLE,,,,,,,,0
RESUME
/COM,ANSYS RELEASE Release 19.0      BUILD 19.0      UP20171214       16:45:32
/POST1
FINISH
/SOL
FINISH
/PREP7
MPTEMP,,,,,,,,
MPTEMP,1,0
MPDE,EX,1
MPDE,NUXY,1
MPDE,PRXY,1
MPDATA,EX,1,,2.1E+005
MPDATA,PRXY,1,,0.3
FINISH
/SOL
RESUME
/COM,ANSYS RELEASE Release 19.0      BUILD 19.0      UP20171214       16:46:21
FLST,2,4,4,ORDE,4
FITEM,2,9
FITEM,2,-10
FITEM,2,13
FITEM,2,-14
/GO
SFL,P51X,PRES,-1,-1
/STATUS,SOLU
SOLVE
FINISH
/POST1
SAVE
/EFACET,1
PLNSOL, U,X, 0,1.0
RESUME
/COM,ANSYS RELEASE Release 19.0      BUILD 19.0      UP20171214       16:49:01
/EFACET,1
PLNSOL, S,X, 0,1.0
SAVE
FINISH
! /EXIT,ALL
/BATCH
/COM,ANSYS RELEASE Release 19.0      BUILD 19.0      UP20171214       17:09:49
/input,menust,tmp,''
/GST,ON
/PLO,INFO,3
/GRO,CURL,ON
/CPLANE,1
WPSTYLE,,,,,,,,0
RESUME
/COM,ANSYS RELEASE Release 19.0      BUILD 19.0      UP20171214       17:10:48
FINISH
! /EXIT,NOSAV
/BATCH
/COM,ANSYS RELEASE Release 19.0      BUILD 19.0      UP20171214       11:32:54
/input,menust,tmp,''
/GST,ON
/PLO,INFO,3
/GRO,CURL,ON
/CPLANE,1
WPSTYLE,,,,,,,,0
RESUME
/COM,ANSYS RELEASE Release 19.0      BUILD 19.0      UP20171214       11:33:46
/POST1
/EFACET,1
PLNSOL, S,X, 0,1.0
/EFACET,1
PLNSOL, S,Y, 0,1.0
/EFACET,1
PLNSOL, S,XY, 0,1.0
/EFACET,1
PLNSOL, S,1, 0,1.0
/EFACET,1
PLNSOL, S,INT, 0,1.0
/EFACET,1
PLNSOL, S,X, 0,1.0
PLESOL, S,X, 0,1.0
/EFACET,1
PLNSOL, S,X, 0,1.0
RESUME
/COM,ANSYS RELEASE Release 19.0      BUILD 19.0      UP20171214       11:35:20
FINISH
/SOL
/CMAP,,,,
/COLOR,SMIN,DGRA
/COLOR,CNTR,BLUE,1
/COLOR,CNTR,CBLU,2
/COLOR,CNTR,CYAN,3
/COLOR,CNTR,GCYA,4
/COLOR,CNTR,GREE,5
/COLOR,CNTR,YGRE,6
/COLOR,CNTR,YELL,7
/COLOR,CNTR,ORAN,8
/COLOR,CNTR,RED,9
/COLOR,SMAX,DGRA
/COLOR,NUM,CYAN,1
/COLOR,NUM,BMAG,2
/COLOR,NUM,RED,3
/COLOR,NUM,CBLU,4
/COLOR,NUM,MRED,5
/COLOR,NUM,GREE,6
/COLOR,NUM,ORAN,7
/COLOR,NUM,MAGE,8
/COLOR,NUM,YGRE,9
/COLOR,NUM,BLUE,10
/COLOR,NUM,GCYA,11
/COLOR,NUM,CYAN,1
/COLOR,NUM,BMAG,2
/COLOR,NUM,RED,3
/COLOR,NUM,CBLU,4
/COLOR,NUM,MRED,5
/COLOR,NUM,GREE,6
/COLOR,NUM,ORAN,7
/COLOR,NUM,MAGE,8
/COLOR,NUM,YGRE,9
/COLOR,NUM,BLUE,10
/COLOR,NUM,GCYA,11
/COLOR,U,CYAN
/COLOR,ROT,ORAN
/COLOR,TEMP,ORAN
/COLOR,VOLT,YGRE
/COLOR,MAG,YGRE
/COLOR,A,BMAG
/COLOR,F,RED
/COLOR,M,CBLU
/COLOR,HEAT,GCYA
/COLOR,AMPS,GCYA
/COLOR,FLUX,GCYA
/COLOR,CSG,YGRE
/COLOR,MAST,BMAG
/COLOR,CP,GREE
/COLOR,CE,MRED
/COLOR,NFOR,MRED
/COLOR,NMOM,GREE
/COLOR,RFOR,MAGE
/COLOR,RMOM,BMAG
/COLOR,PATH,WHIT
/COLOR,U,CYAN
/COLOR,ROT,ORAN
/COLOR,TEMP,ORAN
/COLOR,VOLT,YGRE
/COLOR,MAG,YGRE
/COLOR,A,BMAG
/COLOR,F,RED
/COLOR,M,CBLU
/COLOR,HEAT,GCYA
/COLOR,AMPS,GCYA
/COLOR,FLUX,GCYA
/COLOR,CSG,YGRE
/COLOR,MAST,BMAG
/COLOR,CP,GREE
/COLOR,CE,MRED
/COLOR,NFOR,MRED
/COLOR,NMOM,GREE
/COLOR,RFOR,MAGE
/COLOR,RMOM,BMAG
/COLOR,PATH,WHIT
/CMAP,,,,
/COLOR,CM,CYAN,
/NUMBER,0
/NUMBER,0
/NUMBER,0
/NUMBER,0
/NUMBER,0
/NUMBER,0
/NUMBER,0
/NUMBER,0
/NUMBER,0
/NUMBER,0
/NUMBER,0
/NUMBER,0
/NUMBER,0
/NUMBER,0
/NUMBER,0
/NUMBER,0
/NUMBER,1
/NUMBER,1
FLST,2,2,4,ORDE,2
FITEM,2,9
FITEM,2,14
/GO
SFL,P51X,PRES,-1,-1
RESUME
/COM,ANSYS RELEASE Release 19.0      BUILD 19.0      UP20171214       11:49:26
/NUMBER,1
/NUMBER,1
SAVE
FINISH
/POST1
FINISH
/SOL
FLST,2,2,4,ORDE,2
FITEM,2,11
FITEM,2,-12
/GO
DL,P51X, ,UY,
FLST,2,2,4,ORDE,2
FITEM,2,4
FITEM,2,17
/GO
DL,P51X, ,UX,
FLST,2,4,4,ORDE,4
FITEM,2,9
FITEM,2,-10
FITEM,2,13
FITEM,2,-14
/GO
SFL,P51X,PRES,-1,-1
RESUME
/COM,ANSYS RELEASE Release 19.0      BUILD 19.0      UP20171214       12:01:35
FINISH
/POST1
/EFACET,1
PLNSOL, BFE,TEMP, 0,1.0
/EFACET,1
PLNSOL, BFE,TEMP, 0,1.0
/EFACET,1
PLNSOL, U,X, 0,1.0
/EFACET,1
PLNSOL, U,Y, 0,1.0
/EFACET,1
PLNSOL, U,SUM, 0,1.0
/EFACET,1
PLNSOL, U,SUM, 2,1.0
/EFACET,1
PLNSOL, U,SUM, 1,1.0
/EFACET,1
PLNSOL, U,SUM, 1,1.0
/EFACET,1
PLNSOL, U,SUM, 2,1.0
/DSCALE,ALL,1.0
/EFACET,1
PLNSOL, U,SUM, 2,1.0
/EFACET,1
PLNSOL, U,SUM, 2,1.0
/DSCALE,ALL,AUTO
/EFACET,1
PLNSOL, U,SUM, 2,1.0
/EFACET,1
PLNSOL, U,SUM, 2,1.0
/EFACET,1
PLNSOL, U,SUM, 2,1.0
FINISH
/PREP7
IGESOUT, , ,,0
FINISH
/POST1
/COLOR,WBAK,WHIT,1
/COLOR,WBAK,WHIT,2
/COLOR,WBAK,WHIT,3
/COLOR,WBAK,WHIT,4
/COLOR,WBAK,WHIT,5
/COLOR,WBAK,BLAC,1
/COLOR,WBAK,WHIT,2
/COLOR,WBAK,WHIT,3
/COLOR,WBAK,WHIT,4
/COLOR,WBAK,WHIT,5
/COLOR,WBAK,BLAC,1
/COLOR,WBAK,BLAC,2
/COLOR,WBAK,BLAC,3
/COLOR,WBAK,BLAC,4
/COLOR,WBAK,BLAC,5
/COLOR,WBAK,BLAC,1
/COLOR,WBAK,BLAC,2
/COLOR,WBAK,BLAC,3
/COLOR,WBAK,BLAC,4
/COLOR,WBAK,BLAC,5
/EFACET,1
PLNSOL, S,INT, 2,1.0
/EFACET,1
PLNSOL, S,XZ, 2,1.0
/EFACET,1
PLNSOL, S,XY, 2,1.0
/EFACET,1
PLNSOL, S,YZ, 2,1.0
/EFACET,1
PLNSOL, S,X, 2,1.0
/EFACET,1
PLNSOL, S,Z, 2,1.0
/EFACET,1
PLNSOL, S,1, 2,1.0
/EFACET,1
PLNSOL, S,X, 2,1.0
/EFACET,1
PLNSOL, S,X, 2,1.0
/EFACET,1
PLNSOL, S,X, 2,1.0
/EFACET,1
PLNSOL, S,Y, 2,1.0
/EFACET,1
PLNSOL, S,X, 2,1.0
/EFACET,1
PLNSOL, S,EQV, 2,1.0
/EFACET,1
PLNSOL, S,EQV, 2,1.0
/EFACET,1
PLNSOL, S,Y, 2,1.0
/EFACET,1
PLNSOL, S,Y, 2,1.0
FINISH
! /EXIT,ALL
/BATCH
/COM,ANSYS RELEASE Release 19.0      BUILD 19.0      UP20171214       20:20:16
/input,menust,tmp,''
/GST,ON
/PLO,INFO,3
/GRO,CURL,ON
/CPLANE,1
WPSTYLE,,,,,,,,0
RESUME
/COM,ANSYS RELEASE Release 19.0      BUILD 19.0      UP20171214       20:20:46
/POST1
RESUME
/COM,ANSYS RELEASE Release 19.0      BUILD 19.0      UP20171214       20:21:32
PLDISP,0
RESUME
/COM,ANSYS RELEASE Release 19.0      BUILD 19.0      UP20171214       20:21:52
FINISH
/POST26
FILE,'Demo','rst','.'
NUMVAR,200
SOLU,191,NCMIT
STORE,MERGE
FILLDATA,191,,,,1,1
REALVAR,191,191
FINISH
/SOL
FINISH
/POST1
/EFACET,1
PLNSOL, U,X, 0,1.0
/EFACET,1
PLNSOL, U,X, 0,1.0
RESUME
/COM,ANSYS RELEASE Release 19.0      BUILD 19.0      UP20171214       20:22:33
RESUME
/COM,ANSYS RELEASE Release 19.0      BUILD 19.0      UP20171214       20:22:37
FINISH
! /EXIT,NOSAV
/BATCH
/COM,ANSYS RELEASE Release 19.0      BUILD 19.0      UP20171214       16:15:49
/input,menust,tmp,''
/COM,ANSYS RELEASE Release 19.0      BUILD 19.0      UP20171214       16:15:50
/GST,ON
/PLO,INFO,3
/GRO,CURL,ON
/CPLANE,1
WPSTYLE,,,,,,,,0
RESUME
/COM,ANSYS RELEASE Release 19.0      BUILD 19.0      UP20171214       16:16:00
FINISH
! /EXIT,NOSAV
/BATCH
/COM,ANSYS RELEASE Release 19.0      BUILD 19.0      UP20171214       20:39:49
/input,menust,tmp,''
/COM,ANSYS RELEASE Release 19.0      BUILD 19.0      UP20171214       20:39:50
/GST,ON
/PLO,INFO,3
/GRO,CURL,ON
/CPLANE,1
WPSTYLE,,,,,,,,0
RESUME
/COM,ANSYS RELEASE Release 19.0      BUILD 19.0      UP20171214       20:39:58
/POST1
FINISH
! /EXIT,NOSAV
/BATCH
/COM,ANSYS RELEASE Release 19.0      BUILD 19.0      UP20171214       21:21:08
/input,menust,tmp,''
/COM,ANSYS RELEASE Release 19.0      BUILD 19.0      UP20171214       21:21:09
/GST,ON
/PLO,INFO,3
/GRO,CURL,ON
/CPLANE,1
WPSTYLE,,,,,,,,0
RESUME
/COM,ANSYS RELEASE Release 19.0      BUILD 19.0      UP20171214       21:21:24
/POST1
/EFACET,1
PLNSOL, S,Y, 0,1.0
FINISH
! /EXIT,ALL
/BATCH
/COM,ANSYS RELEASE Release 19.0      BUILD 19.0      UP20171214       23:20:52
/input,menust,tmp,''
/COM,ANSYS RELEASE Release 19.0      BUILD 19.0      UP20171214       23:20:52
/GST,ON
/PLO,INFO,3
/GRO,CURL,ON
/CPLANE,1
WPSTYLE,,,,,,,,0
RESUME
/COM,ANSYS RELEASE Release 19.0      BUILD 19.0      UP20171214       23:20:57
/POST1
FINISH
/SOL
FINISH
/PREP7
ESIZE,1,0,
MSHKEY,0
FLST,5,4,5,ORDE,2
FITEM,5,3
FITEM,5,-6
CM,_Y,AREA
ASEL, , , ,P51X
CM,_Y1,AREA
CHKMSH,'AREA'
CMSEL,S,_Y
ACLEAR,_Y1
AMESH,_Y1
CMDELE,_Y
CMDELE,_Y1
CMDELE,_Y2
FINISH
/SOL
/STATUS,SOLU
SOLVE
FINISH
/POST1
/EFACET,1
PLNSOL, U,SUM, 0,1.0
/EFACET,1
PLNSOL, S,EQV, 0,1.0
/EFACET,1
PLNSOL, S,X, 0,1.0
/EFACET,1
PLNSOL, S,Y, 0,1.0
RESUME
/COM,ANSYS RELEASE Release 19.0      BUILD 19.0      UP20171214       23:25:38
FINISH
! /EXIT,NOSAV
