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/BATCH
/COM,ANSYS RELEASE Release 19.0      BUILD 19.0      UP20171214       23:47:08
/input,menust,tmp,''
/GST,ON
/PLO,INFO,3
/GRO,CURL,ON
/CPLANE,1
WPSTYLE,,,,,,,,0
/SHRINK,0
/ESHAPE,1.0
/EFACET,1
/RATIO,1,1,1
/CFORMAT,32,0
/prep7
et,1,beam188
keyopt,1,3,3
mp,ex,1,2.1e5
mp,nuxy,1,0.3
sectype,1,beam,rect
secdata,30,10
sectype,2,beam,csolid
secdata,10
n,1,-2000
n,2,
n,3,
n,4,,2000
n,5,2000
n,6,-1000
n,7,1000
e,1,6
e,6,2
e,2,7
e,7,5
secnum,2
e,3,4
cp,1,ux,2,3
cp,2,uy,2,3
cp,3,uz,2,3
cp,4,rotx,2,3
cp,5,roty,2,3
finish
/solv
d,1,all
d,5,all
d,4,ux,,
d,4,uy,,
f,6,fy,-1000
f,7,fy,-1000
solv
finish
/POST1
/EFACET,1
PLNSOL, U,SUM, 1,1.0
PLESOL, S,EQV, 0,1.0
AVPRIN,0, ,
ETABLE, ,SMISC, 3
AVPRIN,0, ,
ETABLE, ,SMISC, 16
PLLS,SMIS3,SMIS16,1,0,0
/EFACET,1
PLNSOL, U,X, 1,1.0
PLESOL, S,X, 0,1.0
PLESOL, S,EQV, 0,1.0
! /BATCH
FINISH
/PREP7
ET,1,BEAM188
KEYOPT,1,3,3
MP,EX,1,2.1E5
MP,NUXY,1,0.3
SECTYPE,1,BEAM,RECT
SECDATA,30,10
SECTYPE,2,BEAM,CSOLID
SECDATA,10
N,1,-2000
N,2,
N,3,
N,4,,2000
N,5,2000
N,6,-1000
N,7,1000
E,1,6
E,6,2
E,2,7
E,7,5
SECNUM,2
E,3,4
CP,1,UX,2,3
CP,2,UY,2,3
CP,3,UZ,2,3
CP,4,ROTX,2,3
CP,5,ROTY,2,3
FINISH
/SOLV
D,1,ALL
D,5,ALL
D,4,UX,,
D,4,UY,,
F,6,FY,-1000
F,7,FY,-1000
SOLV
FINISH
FINISH
! /EXIT,NOSAV
