/BATCH
/PREP7
ET,1,BEAM188
KEYOPT,1,3,2
mp,ex,1,1
mp,nuxy,1,0.1
SECTYPE,1,BEAM,RECT
SECDATE,1,1
N,1,
N,2,1
N,3,,1
N,4,1,1
N,5,2,1
E,1,3
E,3,4
E,4,5
E,2,4
FINISH
/SOLV
D,1,ALL
D,2,ALL
D,5,ALL
SF,3,PRES,1
solv
finish
